// COMSOL Multiphysics 5.1.0.234 model "HeatDiffusion_LAO-LSMO-NGO.mph"
// Nickel heating process
// Heating process inside a thin film of Nickel (40nm) on a glass substrate (1um);
// Outline of the model tree

Parameters
  T0 = 293.15  // initial temperature (K)
  thicknessMetal = 77e-9  // Thickness of metal (m)
  thicknessSubstrate = 10e-6  // Thickness of substrate (m)
  tFinal = 10  // Final time (ns)
  dt = 0.01  // Time step (ns)
  densityMetal = 6700  // Density of metal (kg/m3)
  heatCapacityMetal = 568  // Heat capacity at constant pression (J/(kg.K))
  Tsomething = 1000  // temperature (K)
  laserPenetrationDepth = 90e-9  // Laser penetration Depth (m)
  densitySubstrate = 7380  // Density (kg/m3)
  thermalConductivityMetal = 1  // Thermal Conductivity (W/(K.m))
  densityCapLayer = 6520  // Density of the cap layer (kg/m3)
  heatCapacitySubstrate = 382  // Heat capacity of substrate (J/kg.K)
  heatCapacityCapLayer = 514  // Heat capacity of cap layer (J/kg/K)
  thermalConductivitySubstrate = 7  // Thermal conductivity (W/m.K)
  thermalConductivityCapLayer = 10  // Thermal conductivity (W/m.K)
  thicknessCapLayer = 46e-9  // Thickness of cap layer (m)
  spotSize_x = 4e-6  // Initial spot size in x (m)
  spotSize_y = 4e-6  // Initial spot size in y (m)
  nb = 4  // y size = nb*spotSize_y (m)

Functions
  an1: Analytic "Heat Depth Profile" | funcname = heat_depth; expr = exp(-z/laserPenetrationDepth); args = z; argunit = m; fununit = K
  an2: Analytic "Heat Surface Profile" | funcname = surface_profile; expr = exp(-y^2/spotSize_y^2); args = y; argunit = m; fununit = K
  an3: Analytic "Heat Distribution Profile" | funcname = heatDistribution; expr = surface_profile(y)*heat_depth(z); args = {z, y}; argunit = m, m; fununit = K

Geometry
  geom1 "Geometry 1" (2D, length unit m)
    r1: Rectangle
      pos = {(thicknessCapLayer+thicknessMetal+thicknessSubstrate)/2, 0}
      base = center
      layername = {Cap Layer, Metal}
      layer = {thicknessCapLayer, thicknessMetal}
      layerleft = on
      layerright = off
      layerbottom = off
      layertop = off
      size = {thicknessCapLayer+thicknessMetal+thicknessSubstrate, nb*spotSize_y}
    fin: Finalize "Form Union"

Materials
  mat3: Common "LAO" on domains 1
    def "Basic"
      density = densityCapLayer
      heatcapacity = heatCapacityCapLayer
      thermalconductivity = thermalConductivityCapLayer
  mat1: Common "LSMO" on domains 2
    def "Basic"
      thermalconductivity = thermalConductivityMetal
      density = densityMetal
      heatcapacity = heatCapacityMetal
  mat2: Common "NGO" on domains 3
    def "Basic"
      thermalconductivity = thermalConductivitySubstrate
      density = densitySubstrate
      heatcapacity = heatCapacitySubstrate

Physics
  ht: HeatTransfer "Heat Transfer in Solids" on all domains
    dependent variable T
    EquationForm.form = Automatic
    PhysicalModelProperty.IsothermalDomain = 0
    solid1: SolidHeatTransferModel "Heat Transfer in Solids 1" (default)
    init1: init "Initial Values 1" (default) | Tinit = T0+heatDistribution(x,y)
    ins1: ThermalInsulation (default)
    init2: init "Initial Values 2" on domains 3 | Tinit = T0
    tl1: ThinLayer on boundaries 7 | ThermalResistanceType = ThermalResistance; R_s = 5E-7; MultipleLayersStructure = 1
    pc1: PeriodicHeat "Periodic Condition 1" on boundaries 2, 3, 5, 6, 8, 9

Mesh
  mesh1 "Mesh 1"
    size: MeshSizeDefault | hmax = 0.673E-6; hmin = 0.00301E-6; hauto = 5; custom = on
    dis1: Distribution "Distribution_y_CapLayer" on boundaries 1 | numelem = 250
    dis3: Distribution "Distribution_y_Metal" on boundaries 7 | numelem = 250
    dis5: Distribution "Distribution_y_Substrate" on boundaries 7 | numelem = 250
    ftri1: FreeTri "Distribution_triangle" on remaining entities

Studies
  std1 "Study 1"
    time: Transient "Time Dependent"
      tunit = ns
      tlist = range(0,dt,tFinal)
      rtol = 0.001
      physselection = ht
      useinitsol = on
      initmethod = init
      initstudy = zero
      usesol = on
      notsolmethod = init
      notstudy = zero

Solver configurations
  sol1 "Solver1" (study std1)
    v1: Variables "Dependent Variables 1" | scalemethod = none
    t1: Time "Time-Dependent Solver 1"
      tlist = range(0,dt,tFinal)
      atolglobalmethod = scaled
      atolglobal = 0.001
      fieldselection = comp1_T
      timemethod = genalpha
      maxorder = 2
      estrat = exclude
      tstepsgenalpha = free
      initialstepgenalpha = 0.01*dt
      rhoinf = 0
      predictor = constant
      fc1: FullyCoupled | linsolver = d1; jtech = onevery
      d1: Direct

Datasets
  dset1: Solution | solution = sol1
  grid1: Grid1D "Function 1D 1" | function = all; data = dset1; par1 = y; parmin1 = -1E-5; parmax1 = 1E-5
  cln1: CutLine2D | data = dset1; genpoints = {{0.016, -1}, {0.016, 1}}
  cpt1: CutPoint2D "Top Point" | data = dset1; pointx = 0.02; pointy = 0.75
  cln2: CutLine2D "Middle Cut" | data = dset1; genpoints = {{0, 1}, {1, 1}}
  an2_ds1: Grid1D | source = function; function = all; par1 = y; parmin1 = -1.0E-6; parmax1 = 1.0E-6
  an3_ds1: Grid2D
    source = function
    function = all
    par1 = x
    parmin1 = 0
    parmax1 = 1.04E-6
    par2 = y
    parmin2 = -1.0E-6
    parmax2 = 1.0E-6
  an1_ds1: Grid1D "Grid 1D 1a" | source = function; function = all; par1 = x; parmin1 = 0; parmax1 = 1.04E-6
  an3_ds2: Grid2D
    source = function
    function = all
    par1 = x
    parmin1 = 0
    parmax1 = 4.0E-8
    par2 = y
    parmin2 = -1.0E-6
    parmax2 = 1.0E-6
  an3_ds3: Grid2D
    source = function
    function = all
    par1 = x
    parmin1 = 0
    parmax1 = 4.0E-8
    par2 = y
    parmin2 = -1.0E-6
    parmax2 = 1.0E-6
  an3_ds4: Grid2D
    source = function
    function = all
    par1 = x
    parmin1 = 0
    parmax1 = 4.0E-8
    par2 = y
    parmin2 = -1.0E-6
    parmax2 = 1.0E-6
  an1_ds2: Grid1D | source = function; function = all; par1 = x; parmin1 = 0; parmax1 = 1.0E-7
  an2_ds2: Grid1D "Grid 1D 2a" | source = function; function = all; par1 = y; parmin1 = -2.5E-6; parmax1 = 2.5E-6
  an3_ds5: Grid2D
    source = function
    function = all
    par1 = x
    parmin1 = 0
    parmax1 = 1.0E-7
    par2 = y
    parmin2 = -2.5E-6
    parmax2 = 2.5E-6
  an3_ds6: Grid2D
    source = function
    function = all
    par1 = x
    parmin1 = 0
    parmax1 = 1.0E-7
    par2 = y
    parmin2 = -2.0E-6
    parmax2 = 2.0E-6

Plots
  pg1: PlotGroup2D "Temperature (ht)" | data = dset1; xlabel = x; ylabel = y; animating = off
    surf1: Surface | expr = T
  pg2: PlotGroup2D "Isothermal Contours (ht)" | data = dset1; xlabel = z; ylabel = x
    con1: Contour | expr = T
    arws1: ArrowSurface | expr = {ht.tfluxx, ht.tfluxy}
  pg4: PlotGroup1D "1D Plot Group 4" (disabled) | data = cln1
    lngr1: LineGraph "StrainFreeInterface" | expr = v
  pg5: PlotGroup1D "DisplacementTopPoint" (disabled) | data = cln2
    ptgr1: PointGraph | data = cpt1; expr = solid.eel22
  pg6: PlotGroup2D "2D Plot Group 6" | data = none; title = heatDistribution(x,y) (K)
    plot1: Surface | data = an3_ds6; expr = heatDistribution(root.x[m],root.y[m])
      height1: Height "Height Expression 1" | expr = comp1.T

Exports
  anim1: Animation (disabled) | target = player; onlydisplay = off; options = off; axes = on
  data1: Data "PointDisplacement" (disabled)
    data = cpt1
    expr = u
    filename = D:\Valentin\Documents\COMSOL\PGaal\PointDisplacementVSTime.txt
  plot1: Plot (disabled) | filename = D:\Valentin\Documents\COMSOL\PGaal\NickelGLass_V_component_X=0.016um.txt
  plot2: Plot (disabled) | filename = D:\Valentin\Documents\COMSOL\PGaal\ElastcStrainTensorVSTime.txt
  data2: Data "Temperature"
    data = dset1
    expr = T
    filename = D:\Valentin\Documents\COMSOL\TransientGrating\Sample2_PGaal\LSMO_100nm_dt10ps_gr4um_k015_Kapitza5e-7.txt
    location = grid
    gridx2 = range(0,thicknessMetal/100,thicknessMetal+thicknessSubstrate)
    gridy2 = range(-lambda*numberPeriod/2,lambda*numberPeriod/100,lambda*numberPeriod/2)
  anim3: Animation
    type = movie
    giffilename = D:\Valentin\Documents\COMSOL\TransientGrating\Ni\animation_Tvst_Ni_40nm_gr_1um.gif
    framesel = all
    options = on
    axes = on
  mesh1: Mesh | data = dset1; filename = D:\Valentin\Documents\COMSOL\TransientGrating\Ni\mesh_Ni_40nm_gr_1um.mphbin
  plot3: Plot | filename = D:\Valentin\Documents\COMSOL\TransientGrating\Ni\2D_test.txt